f(x) := (e^(-sin(x)) + e^cos(x))*e^(sin(3*x) - sin(x))
x0 := 1
h0 := 10^-3
f1p(x, h) := (f(x + h) - f(x))/h
f1l(x, h) := (f(x) - f(x - h))/h
f1c(x, h) := (f(x + h) - f(x - h))/(2*h)
f2(x, h) := (f(x + h) - 2*f(x) + f(x - h))/h^2
f3(x, h) := (f(x + 2*h) - 2*f(x + h) + 2*f(x - h) - f(x - 2*h))/(2*h^3)
f4(x, h) := (f(x + 2*h) - 4*f(x + h) + 6*f(x) - 4*f(x - h) + f(x - 2*h))/h^4
# точное решение
ft1(x) := d/dx(f(x)) → -e^(sin(3*x) - sin(x))*(e^(-sin(x))*cos(x) + e^cos(x)*sin(x)) - e^(sin(3*x) - sin(x))*(e^(-sin(x)) + e^cos(x))*(cos(x) - 3*cos(3*x))
ft2(x) := d^2/dx^2(f(x)) → e^(sin(3*x) - sin(x))*(e^(-sin(x))*cos(x)^2 - e^cos(x)*cos(x) + e^cos(x)*sin(x)^2 + e^(-sin(x))*sin(x)) + 2*e^(sin(3*x) - sin(x))*(e^(-sin(x))*cos(x) + e^cos(x)*sin(x))*(cos(x) - 3*cos(3*x)) + e^(sin(3*x) - sin(x))*(e^(-sin(x)) + e^cos(x))*(sin(x) - 9*sin(3*x)) + e^(sin(3*x) - sin(x))*(e^(-sin(x)) + e^cos(x))*(cos(x) - 3*cos(3*x))^2
ft3(x) := d^3/dx^3(f(x)) → e^(sin(3*x) - sin(x))*(e^(-sin(x))*cos(x) - e^cos(x)*sin(x)^3 - e^(-sin(x))*cos(x)^3 + e^cos(x)*sin(x) + 3*e^cos(x)*cos(x)*sin(x) - 3*e^(-sin(x))*cos(x)*sin(x)) - 3*e^(sin(3*x) - sin(x))*(e^(-sin(x))*cos(x) + e^cos(x)*sin(x))*(sin(x) - 9*sin(3*x)) - 3*e^(sin(3*x) - sin(x))*(cos(x) - 3*cos(3*x))*(e^(-sin(x))*cos(x)^2 - e^cos(x)*cos(x) + e^cos(x)*sin(x)^2 + e^(-sin(x))*sin(x)) + e^(sin(3*x) - sin(x))*(e^(-sin(x)) + e^cos(x))*(cos(x) - 27*cos(3*x)) - 3*e^(sin(3*x) - sin(x))*(e^(-sin(x))*cos(x) + e^cos(x)*sin(x))*(cos(x) - 3*cos(3*x))^2 - e^(sin(3*x) - sin(x))*(e^(-sin(x)) + e^cos(x))*(cos(x) - 3*cos(3*x))^3 - 3*e^(sin(3*x) - sin(x))*(e^(-sin(x)) + e^cos(x))*(cos(x) - 3*cos(3*x))*(sin(x) - 9*sin(3*x))
ft4(x) := d^4/dx^4(f(x))  # error: Возвращенный символьный результат слишком велик для отображения, но его можно использовать в последующих вычислениях, \если присвоить функции или переменной.
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f1p(x0, h0) = -4.56548
f1l(x0, h0) = -4.58439
f1c(x0, h0) = -4.57493
ft1(x0) = -4.57492
f2(x0, h0) = 18.9106
ft2(x0) = 18.9106
f3(x0, h0) = -44.8342
ft3(x0) = -44.8352
f4(x0, h0) = -221.229
ft4(x0) = -221.223
E1l(h) := |ft1(x0) - f1l(x0, h)|/|ft1(x0)|
E1p(h) := |ft1(x0) - f1p(x0, h)|/|ft1(x0)|
E1c(h) := |ft1(x0) - f1c(x0, h)|/|ft1(x0)|
E2(h) := |ft2(x0) - f2(x0, h)|/|ft2(x0)|
E3(h) := |ft3(x0) - f3(x0, h)|/|ft3(x0)|
E4(h) := |ft4(x0) - f4(x0, h)|/|ft4(x0)|
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