# Метод наименьших квадратов
f(x) := (e^(-sin(x)) + e^cos(x))*e^(sin(3*x) - sin(x))
a := 4
b := 6
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m1 := 8
n := 2^m1
h := (b - a)/n
i := 0 .. n
x1[i] := a + i*h
y1[i] := f(x1[i]) + rnd(10) - 5
st := 10
xx(st) := regress(x1, y1, st)
fp(x, st) := interp(xx(st), x1, y1, x)
j := 0 .. n
tx[j] := min(x1) + (max(x1) - min(x1))/(n + 1)*j
ff(j, st) := fp(tx[j], st)
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E[j] := |y1[j] - ff(j, st)|
Ecp := mean(E)
Em := max(E)
DD(n) := sum(y1[k] - ff(k, st)^2, k = 0 .. n)/(n - st)
DD(n) = -220.765
sr1 := mean(E) = 2.46488
sm := max(E) = 5.72721
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