# Преобразование Фурье
f(x) := (e^(-sin(x)) + e^cos(x))*e^(sin(3*x) - sin(x))
a := 0
b := 2
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m := 8
n := 2^m
nn := n - 1
h := (b - a)/nn
i := 0 .. nn
x1[i] := a + i*h
y1[i] := f(x1[i]) + rnd(10) - 5
# Прямое преобразование Фурье
A := fft(y1)
k := 3
k2 := 100
j := 0 .. n/2
j := 0 .. n/2
g[j] := if(j ≤ k, A[j], 0)
g2[j] := if(j ≤ k2, A[j], 0)
# Обратное преобразование
f1 := ifft(g)
f2 := ifft(g2)
i2 := 0 .. n
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# коэффициенты Фурье
# Приближение ступенчато-заданной функции
ii1 := 0 .. 50
yi1[ii1] := 10
ii2 := 51 .. 255
yi1[ii2] := 20
A2 := fft(yi1)
k := 15
j := 0 .. n/2
g[j] := if(j ≤ k, A2[j], 0)
f1 := ifft(g)
i := 0 .. n
# количество гармоник 15
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k := 150
j := 0 .. n/2
g[j] := if(j ≤ k, A2[j], 0)
f2 := ifft(g)
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# количество гармоник 150
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# коэффициенты Фурье
