# Преобразование Фурье
f(x) := (e^(-sin(x)) + e^cos(x))*e^(sin(3*x) - sin(x))
a := 1
b := 6
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m := 8
n := 2^m
nn := n - 1
h := (b - a)/nn
i := 0 .. nn
x1[i] := a + i*h
y1[i] := f(x1[i]) + rnd(10) - 5
# Прямое преобразование Фурье
A := fft(y1)
k := 10
j := 0 .. n/2
g[j] := if(j ≤ k, A[j], 0)
# Обратное преобразование
f1 := ifft(g)
i2 := 0 .. n
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# Приближение ступенчато-заданной функции
x2[i] := a + i*h
y2[i] := f(x2[i]) + rnd(10) - 5
# Прямое преобразование
A2 := fft(y2)
k := 15
j := 0 .. n/2
g[j] := if(j ≤ k, A[j], 0)
# Обратное преобразование
A := ifft(g)
i := 0 .. n
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